# 16bit Timer resoliution
CLK := 10 MHz
1/CLK*100000 = 10 ms
DIV := 8
t_res := 1/(CLK/DIV) = 0.8 μs  # Reduce bits number
div := 32
t_max := 2^16*t_res = 52.4288 ms
Value_max := 2^16/div = 2048
c := 340*m/s
t_res2 := div*t_res = 25.6 μs
L_res := c*t_res = 0.272 mm
L_res2 := c*t_res2 = 8.704 mm
L_max := c*t_max = 17.8258 m
RF_transmit := 500 μs
Refresh := 1/(t_max + RF_transmit*8) = 17.7214 Hz
# PW0268 calculations
R_clk := 47 kΩ
C_clk := 22 pF
clk := 1/(2*π*R_clk*C_clk) = 153.922 kHz
